A := [5, 5, 4; 4, 5, 4; 0, 0, 4]
B := [2, 5, 5; 1, 3, 1; 5, 1, 2]
V1 := [3; 0; 3]
V2 := [0; 2; 3]
V := [1; 5; 0]
C1 := A + B = [7, 10, 9; 5, 8, 5; 5, 1, 6]
D := A*V1 = [27; 24; 12]
C2 := A*B = [35, 44, 38; 33, 39, 33; 20, 4, 8]
q := transpose(V1)*V2 = 9
p := transpose(V1)*A*V2 = 102
V1 := [3; 2; 3]
V2 := [4; 2; 0]
V1×V2 = [-6; 12; -2]
|V1| = 4.69042
cosΦ := V1*V2/(|V1|*|V2|) = 0.76277
|V2| = 4.47214
V1*V2 = 16
V(0)*cos(V(1))*sin(V(2)) = 0
V(0)*sin(V(1))*sin(V(2)) = 0
V(0)*cos(V(2)) = 1
