f(x) := sin(π*x)*sqrt(|x|)
x1 := -6
x2 := 6
deltaX := 0.1
# Область отображения в окне
# количество точек
Xlw := 100
Ylw := 200
Xhw := 800
N := (x2 - x1)/deltaX = 120
Yhw := 900
i := 0 .. N
X[i] := x1 + i*deltaX
Y[i] := f(X[i])
Z[i] := 1
Xl := min(X) = -6
Xh := max(X) = 6
Yl := min(Y) = -2.34521
Yh := max(Y) = 2.34521
# матрица с матрицами
M := stack(transpose(X), transpose(Y), transpose(Z))
Y = [
    0; 0.7506; 1.41557; 1.9315; 2.25061; 2.34521; 2.21006; 1.8625; 1.34036; 0.697859
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]
X = [
    -6; -5.9; -5.8; -5.7; -5.6; -5.5; -5.4; -5.3; -5.2; -5.1
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]
# ширина окна
deltax := Xh - Xl = 12
deltaXw := Xhw - Xlw = 700
# высота окна
deltay := Yh - Yl = 4.69042
deltaYw := Yhw - Ylw = 700
ky := deltaYw/deltay = 149.241
kx := deltaXw/deltax = 58.3333
M = [
    -6, -5.9, -5.8, -5.7, -5.6, -5.5, -5.4, -5.3, -5.2, -5.1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;
    0, 0.7506, 1.41557, 1.9315, 2.25061, 2.34521, 2.21006, 1.8625, 1.34036, 0.697859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;
    1, 1, 1, 1, 1, 1, 1, 1, 1, 1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]
Tsw := [kx, 0, Xlw - kx*Xl; 0, -ky, Yhw + ky*Yl; 0, 0, 1]
Mw := Tsw*M
Xw := transpose(Mw)[:, 0]
Yw := transpose(Mw)[:, 1]  # берём первый и второй столбик
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