# Задаем координаты вершин пирамиды и положения камеры:
PIR := [0, 0, 3, 0, 0, 1; 3, 0, 0, 1, 0, 0; 0, 0, 0, 3, 3, 3; 1, 1, 1, 1, 1, 1]
PV := [10; 315; 45]
# Получаем сферические координаты точки наблюдения:
r_v := PV[0] = 10
ϕ_v := PV[1]*π/180 = 5.49779
θ_v := PV[2]*π/180 = 0.785398
# Задаем положение секущей плоскости в МСК XYZ
# -угол между осью z и вектором нормали к секущей плоскости
ϕ_grad := 50
ϕ := ϕ_grad/180*π
ϕ = 0.872665
# - вектор нормали к секущей плоскости
N := transpose([0, sin(ϕ), cos(ϕ)])
# - координаты точки пересечения оси Z и секущей плоскости
x_0 := 0
y_0 := 0
z_0 := 3/4*PIR[:, 3][2]
z_0 = 2.25
# Задаем параметры уравнения секущей плоскости
[A; B; C] := N
[A; B; C] = [0; 0.766044; 0.642788]
D := -(A*x_0 + B*y_0 + C*z_0)
D = -1.44627
# Находим точку пересечения P1 секущей плоскости с ребром AD
[x1; y1; z1] := submatrix(PIR, 0, 2, 0, 0) = [0; 3; 0]
[x2; y2; z2] := submatrix(PIR, 0, 2, 3, 3) = [0; 1; 3]
Δx := x2 - x1
Δy := y2 - y1
Δz := z2 - z1
t_AD1 := -((A*x1 + B*y1 + C*z1 + D)/(A*Δx + B*Δy + C*Δz))
# - параметр, при котором ребро и плоскость имеют общую точку. Если между 0 и 1, то ребро пересекает плоскость
t_AD := 0.3
x_AD := x1 + Δx*t_AD
y_AD := y1 + Δy*t_AD
z_AD := z1 + Δz*t_AD
x_AD = 0
y_AD = 2.4
z_AD = 0.9  # - координаты точки пересечения Р1
# Находим точку пересечения P2 секущей плоскости с ребром CF
V1 := submatrix(PIR, 0, 2, 2, 2) = [3; 0; 0]
V2 := submatrix(PIR, 0, 2, 5, 5) = [1; 0; 3]
ΔV := V2 - V1
t_CF := -((N*V1 + D)/(N*ΔV))
V_CF := V1 + ΔV*t_CF
x_CF := V_CF[0]
y_CF := V_CF[1]
z_CF := V_CF[2]  # - координаты точки пересечения Р2
# Находим точку пересечения P3 секущей плоскости с ребром BE
V1 := submatrix(PIR, 0, 2, 1, 1) = [0; 0; 0]
V2 := submatrix(PIR, 0, 2, 4, 4) = [0; 0; 3]
ΔV := V2 - V1
t_BE := -((N*V1 + D)/(N*ΔV))
V_BE := V1 + ΔV*t_BE
x_BE := V_BE[0]
y_BE := V_BE[1]
z_BE := V_BE[2]  # - координаты точки пересечения Р3
# Получаем матрицу мировых коорднат точек P1, P2, P3
TR := [x_AD, x_CF, x_BE; y_AD, y_CF, y_BE; z_AD, z_CF, z_BE; 1, 1, 1]
# Задаем область отображения графика в окне Windows
x_LW := 200
y_LW := 100  # – левый верхний угол области отображения
x_HW := 700
y_HW := 500  # – правый нижний угол области отображения
# Формируем матрицу пересчета мировых координат в видовые
K_view := [
    -sin(ϕ_v), cos(ϕ_v), 0, 0;
    -cos(θ_v)*cos(ϕ_v), -cos(θ_v)*sin(ϕ_v), sin(θ_v), 0;
    -sin(θ_v)*cos(ϕ_v), -sin(θ_v)*sin(ϕ_v), -cos(θ_v), r_v;
    0, 0, 0, 1
]
# Вычисляем координаты вершин пирамиды в видовой системе координат (ВСК)
PIR_V := K_view*PIR
# Вычисляем координаты вершин треугольника сечения Р1,
# Р2, Р3 в видовой системе координат (ВСК)
TR_V := K_view*TR
# Определяем координаты проекции вершин пирамиды на картинную плоскость
P_XY := stack(transpose(transpose(PIR_V)[:, 0]), transpose(transpose(PIR_V)[:, 1]), transpose(transpose(PIR_V)[:, 3]))
# Определяем координаты проекции вершин треугольника сечения Р1,
# Р2, Р3 на картинную плоскость
TR_XY := stack(transpose(transpose(TR_V)[:, 0]), transpose(transpose(TR_V)[:, 1]), transpose(transpose(TR_V)[:, 3]))
# Определяем габаритную область проекции пирамиды на плоскость XY ВСК – картинную плоскость
x_L := min(transpose(P_XY)[:, 0])
y_H := max(transpose(P_XY)[:, 1])
# – левый верхний угол
x_L = 0
y_H = 2.62132
x_H := max(transpose(P_XY)[:, 0])
y_L := min(transpose(P_XY)[:, 1])
# – правый нижний угол
x_H = 2.12132
y_L = -1.5
# Вычисляем параметры, необходимые для формирования матрицы пересчета координат из плоскости XY ВСК в ОК
Δx_W := x_HW - x_LW
Δx_W = 500
Δx := x_H - x_L
Δx = 2.12132
Δy_W := y_HW - y_LW
Δy_W = 400
Δy := y_H - y_L
Δy = 4.12132
k_x := Δx_W/Δx
k_x = 235.702
k_y := Δy_W/Δy
k_y = 97.0563
T_SW := [k_x, 0, x_LW - k_x*x_L; 0, -k_y, y_HW + k_y*y_L; 0, 0, 1]  # – матрица пересчета из ВСК в ОК
# Вычисляем оконные координаты вершин пирамиды
M_W := T_SW*P_XY
[x_a, x_b, x_c, x_d, x_e, x_f; y_a, y_b, y_c, y_d, y_e, y_f; q, q, q, q, q, q] := vectorize(round(M_W))
# Формируем массивы координат X и Y для рисования пирамиды
X := transpose([x_a, x_b, x_c, x_a, x_d, x_e, x_b, x_e, x_f, x_c, x_f, x_d])
Y := transpose([y_a, y_b, y_c, y_a, y_d, y_e, y_b, y_e, y_f, y_c, y_f, y_d])
# Вычисляем оконные координаты вершин
# треугольника сечения Р1, Р2, Р3
TR_W := T_SW*TR_XY
[x_p1, x_p2, x_p3; y_p1, y_p2, y_p3; q, q, q] := vectorize(round(TR_W)) = [600, 450, 200; 176, 273, 200; 1, 1, 1]
# Формируем массивы координат Х и У для рисования
# сечения пирамиды
XC := transpose([x_p1, x_p2, x_p3, x_p1])
YC := transpose([y_p1, y_p2, y_p3, y_p1])
# Вычисляем декартовы координаты камеры (вектора,
# определяющего положение камеры)
R_C := [r_v*sin(θ_v)*cos(ϕ_v); r_v*sin(θ_v)*sin(ϕ_v); r_v*cos(θ_v)] = [5; -5; 7.07107]
X1 := transpose([x_e, x_b, x_c, x_f, x_e, x_d, x_f, x_c, x_a, x_d])
N[ADC] := AC □ □  # error: Необходим оператор.
q1 := R[C]*N[ADC]  # error: Эта переменная не определена.
Y1 := transpose([y_e, y_b, y_c, y_f, y_e, y_d, y_f, y_c, y_a, y_d])
AC := [X[c]; Y[c]; q] - [X[b]; Y[b]; q]  # error: Эта переменная не определена.
AC := [X[c]; Y[c]; q] - [X[b]; Y[b]; q]  # error: Эта переменная не определена.
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# координаты вершин
A := transpose([0, 3, 0, 1])
B := transpose([0, 0, 0, 1])
PV := [10; 315; 45]
C := transpose([3, 0, 0, 1])
D := transpose([0, 1, 3, 1])
E := transpose([0, 0, 3, 1])
F := transpose([1, 0, 3, 1])
# координаты камеры
r := 10
φ := 315
φv := φ*π/180
градусы, радианы
θ := 45
θv := θ*π/180
# задаем область отображения пирамиды в окне шиндавс
xLW := 100
yLW := 200
xHW := 800
yHW := 900  # правый нижний угол области отображения
# формируем матрицу координат
PIR := augment(A, B, C, D, E, F) = [0, 0, 3, 0, 0, 1; 3, 0, 0, 1, 0, 0; 0, 0, 0, 3, 3, 3; 1, 1, 1, 1, 1, 1]
PIR := [0, 0, 3, 0, 0, 1; 3, 0, 0, 1, 0, 0; 0, 0, 0, 3, 3, 3; 1, 1, 1, 1, 1, 1]
K_view := [
    -sin(ϕ_v), cos(ϕ_v), 0, 0;
    -cos(θ_v)*cos(ϕ_v), -cos(θ_v)*sin(ϕ_v), sin(θ_v), 0;
    -sin(θ_v)*cos(ϕ_v), -sin(θ_v)*sin(ϕ_v), -cos(θ_v), r_v;
    0, 0, 0, 1
]
# вычисляем координаты вершин пирамиды в видовой системе координат
PIR_V := K_view*PIR
PIR_V = [
    2.12132, 0, 2.12132, 0.707107, 0, 0.707107;
    1.5, 0, -1.5, 2.62132, 2.12132, 1.62132;
    11.5, 10, 8.5, 8.37868, 7.87868, 7.37868;
    1, 1, 1, 1, 1, 1
]
# определяем координаты проекции вершин  пирамиды на картинную плоскасть (плоскость XvYv в видовой системе координат)
XV := transpose(PIR_V)[:, 0]  # вектор X координат
YV := transpose(PIR_V)[:, 1]  # вектор Y координат
IV := transpose(PIR_V)[:, 3]  # вектор из единиц
# Формируем матрицу из коод=рдинат проекций вершин пирамиды на картинную плоскость XvYv
Pxy := stack(transpose(XV), transpose(YV), transpose(IV))
Pxy = [
    2.12132, 0, 2.12132, 0.707107, 0, 0.707107;
    1.5, 0, -1.5, 2.62132, 2.12132, 1.62132;
    1, 1, 1, 1, 1, 1
]
# определяем габаритную область проекции пирамиды на плоскость XvYv видовой СК - картинную плоскость
-левый*верхний*угол
xL := min(XV)
yH := max(YV)
xL = 0
yH = 2.62132
# правый нижний угол
xH := max(XV)
yL := min(YV)
xH = 2.12132
yL = -1.5
# вычисляем параметры, необходимые для формирования матрицы пересчета координат из плоскости  XvYv видовой СК в оконную СК
ΔxW := xHW - xLW
ΔxW = 700
Δx := xH - xL
Δx = 2.12132
ΔyW := yHW - yLW
ΔyW = 700
Δy = 4.12132
Δy := yH - yL
kx := ΔxW/Δx
kx = 329.983
ky := ΔyW/Δy
ky = 169.848
# формируем матрицу пересчета координат из видовой СК в оконную СК
Tsw := [kx, 0, xLW - kx*xL; 0, -ky, yHW + ky*yL; 0, 0, 1]
Tsw = [329.983, 0, 100; 0, -169.848, 645.227; 0, 0, 1]
# Вычисляем оконные координаты вершин пирамиды
M1W := Tsw*Pxy
MW := vectorize(round(M1W))  # округление до целых
[x_a, x_b, x_c, x_d, x_e, x_f; y_a, y_b, y_c, y_d, y_e, y_f; q, q, q, q, q, q] := MW
RC := [r_v*sin(θ_v)*cos(ϕ_v); r_v*sin(θ_v)*sin(ϕ_v); r_v*cos(θ_v)]
R_C := [r_v*sin(θ_v)*cos(ϕ_v); r_v*sin(θ_v)*sin(ϕ_v); r_v*cos(θ_v)] = [5; -5; 7.07107]
AC := [C[0]; C[1]; C[2]] - [A[0]; A[1]; A[2]]  # координаты вектора AC (без единицы)
AD := [D[0]; D[1]; D[2]] - [A[0]; A[1]; A[2]]  # координаты вектора AD (без единицы)
NADC := AC×AD  # вектор внешней нормали к грани ADC
NADB := transpose([0, -1, 0])  # вектор внешней нормали к грани ADB
NBDC := transpose([-1, 0, 0])  # вектор внешней нормали к грани BDC
NABC := transpose([0, 0, -1])  # вектор внешней нормали к грани ADB
# Определяем видимость граней пирамиды
# определяем видимость грани ADFC
q1 := RC*NADFC  # error: Эта переменная не определена.  # скалярное произведение векторов РЦ и НАДС
# определяем видимость грани ADC
s1 :=
    "Грань ADFC видима" if q1 ≥ 0
    "Грань ADFC невидима" otherwise  # error: Эта переменная не определена.
q1 := RC*NADC  # скалярное произведение векторов РЦ и НАДС
s1 :=
    "Грань ADC видима" if q1 ≥ 0
    "Грань ADC невидима" otherwise
s1 = "Грань ADC невидима"
s1 = "Грань ADC невидима"
# определяем видимость грани ADB
q2 := RC*NADB  # скалярное произведение векторов РЦ и НАДB
s2 :=
    "Грань ADB видима" if q2 ≥ 0
    "Грань ADB невидима" otherwise
s2 = "Грань ADB видима"
# определяем видимость грани BDC
q3 := RC*NBDC  # скалярное произведение векторов РЦ и НBDC
s3 :=
    "Грань BDC видима" if q3 ≥ 0
    "Грань BDC невидима" otherwise
s3 = "Грань BDC невидима"
# определяем видимость грани ABC
q4 := RC*NABC  # скалярное произведение векторов РЦ и НABC
s4 :=
    "Грань ABC видима" if q4 ≥ 0
    "Грань ABC невидима" otherwise
s4 = "Грань ABC невидима"
# ОПРЕДЕЛЯЕМ ПОРЯДОК ОБХОДА ВЕРШИН ДЛЯ РИСОВАНИЯ ВИДИМЫХ ГРАНЕЙ
# в данном случае видимы грани /// и ...
X := [x[a], x[d], x[b], □, □, □]  # error: Пустой местозаполнитель.
