# координаты вершин
A := transpose([0, 3, 0, 1])
B := transpose([0, 0, 0, 1])
PV := [10; 315; 45]
C := transpose([3, 0, 0, 1])
D := transpose([0, 1, 3, 1])
E := transpose([0, 0, 3, 1])
F := transpose([1, 0, 3, 1])
# координаты камеры
r := 10
φ := 315
φv := φ*π/180
градусы, радианы
θ := 45
θv := θ*π/180
# задаем область отображения пирамиды в окне шиндавс
xLW := 100
yLW := 200
xHW := 800
yHW := 900  # правый нижний угол области отображения
# формируем матрицу координат
PIR := augment(A, B, C, D, E, F)
K[view] := [-sin(φv), □, □, □; □, □, □, □; □, □, □, □; □, □, □, □]  # error: Пустой местозаполнитель.
