# 1. Найти точку пересечения прямых
Given
x + y == 14
x - y == 1
o := 15/2
Find(x, y) → [15/2; 13/2]
p := 13/2
x := [2; 5; 2; 5]
x := [2; 5; 2; 5]
y := [12; 9; □; 6]  # error: Пустой местозаполнитель.
y := [12; 9; 3; 6]
# 2. Найти новую систему координат
# Матрица координат | Матрица перемещения | Координаты для отображения прямых на графике
px[0] := -5.5
py[1] := 2.5
P := [x[0], x[1], x[2], x[3]; y[0], y[1], y[2], y[3]; 1, 1, 1, 1]
Ts(dx, dy) := [1, 0, -dx; 0, 1, -dy; 0, 0, 1]
px[1] := -2.5
py[2] := -3.5
py[0] := 5.5
py[3] := -0.5
P1 := Ts(o, p)*P
# матрица новых координат
P12 := [px[0], px[1], px[0], px[1]; py[0], py[1], py[2], py[3]]
P1 = [-5.5, -2.5, -5.5, -2.5; 5.5, 2.5, -3.5, -0.5; 1, 1, 1, 1]
P11 := submatrix(P1, 0, 1, 0, 3) = [-5.5, -2.5, -5.5, -2.5; 5.5, 2.5, -3.5, -0.5]
PABX := submatrix(P11, 0, 0, 0, 1) = [-5.5, -2.5]
PABY := submatrix(P11, 1, 1, 0, 1) = [5.5, 2.5]
PCDX := submatrix(P11, 0, 0, 2, 3) = [-5.5, -2.5]
PCDY := submatrix(P11, 1, 1, 2, 3) = [-3.5, -0.5]
ABX := transpose([x[0], x[1]])
CDX := transpose([x[2], x[3]])
ABY := transpose([y[0], y[1]])
CDY := transpose([y[2], y[3]])
PX := 0
PY := 0
# 3. Повернуть прямые
# Матрица поворота на 180 гр.
Rs := [cos(π), -sin(π), 0; sin(π), cos(π), 0; 0, 0, 1] = [-1, 0, 0; 0, -1, 0; 0, 0, 1]
P2 := Rs*P1 = [5.5, 2.5, 5.5, 2.5; -5.5, -2.5, 3.5, 0.5; 1, 1, 1, 1]
x2 := transpose(P2)[:, 0]
y2 := transpose(P2)[:, 1]
# Координаты для отображения прямых на графике
px1[0] := 2
py1[1] := 9
px2[0] := 13
py2[1] := 4
px1[1] := 5
py1[2] := 3
px2[1] := 10
py2[2] := 9
py1[0] := 12
py1[3] := 5
py2[0] := 1
py2[3] := 7
P121 := [px1[0], px1[1], px1[0], px1[1]; py1[0], py1[1], py1[2], py1[3]]
P122 := [px2[0], px2[1], px2[0], px2[1]; py2[0], py2[1], py2[2], py2[3]]
P5 := [px[0], px[1], px[0], px[1]; py[0], py[1], py[2], py[3]; 1, 1, 1, 1]
P3 := [x2[0], x2[1], x2[2], x2[3]; y2[0], y2[1], y2[2], y2[3]; 1, 1, 1, 1]
P6 := Ts(-o, -p)*P5
P4 := Ts(-o, -p)*P3
P6 = [2, 5, 2, 5; 12, 9, 3, 6; 1, 1, 1, 1]
P4 = [13, 10, 13, 10; 1, 4, 10, 7; 1, 1, 1, 1]
# 1) Прямые до поворота | 2) Прямые после поворота
ABX2 := transpose([px1[0], px1[1]])
CDX2 := transpose([px1[0], px1[1]])
ABX1 := transpose([px2[0], px2[1]])
CDX1 := transpose([px2[0], px2[1]])
ABY2 := transpose([py1[0], py1[1]])
CDY2 := transpose([py1[2], py1[3]])
ABY1 := transpose([py2[0], py2[1]])
CDY1 := transpose([py2[2], py2[3]])
P31 := submatrix(P6, 0, 1, 0, 3)
P21 := submatrix(P4, 0, 1, 0, 3)
PABX := submatrix(P31, 0, 0, 0, 1)
PABX2 := submatrix(P21, 0, 0, 0, 1)
PABY := submatrix(P31, 1, 1, 0, 1)
PABY2 := submatrix(P21, 1, 1, 0, 1)
PCDX := submatrix(P31, 0, 0, 2, 3)
PCDX2 := submatrix(P21, 0, 0, 2, 3)
PCDY := submatrix(P31, 1, 1, 2, 3)
PCDY2 := submatrix(P21, 1, 1, 2, 3)
PABX = [2, 5]
PABX2 = [13, 10]
PABY = [12, 9]
PABY2 = [1, 4]
PCDX = [2, 5]
PCDX2 = [13, 10]
PCDY = [3, 6]
PCDY2 = [10, 7]
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